// SBML level 3 version 1

function conc(q, vol)
  piecewise(q/vol, vol > 1e-5, 0);
end

function metab_MM(Vmax, Km, PC, q, vol)
  vol*Vmax*conc(q, vol)/(PC*Km + conc(q, vol));
end

function metab_MA(CLH, PC, q, vol)
  CLH*conc(q, vol)/PC;
end

model euromix()

  // Compartments:
  compartment default_compartment = 1;
  compartment Fat = 14.63;
  compartment Rich = 7.35;
  compartment pp = 32.243;
  compartment liver = 1.68;
  compartment gut = 1;
  compartment su = 2.0862;
  compartment se = 0.2318;
  compartment scu = 0.0171;
  compartment sce = 0.0019;
  compartment Art = 1.586667;
  compartment Ven = 3.173333;

  // Species:
  substanceOnly species QFat in Fat = 0;
  substanceOnly species QRich in Rich = 0;
  substanceOnly species QPoor in pp = 0;
  substanceOnly species QLiver in liver = 0;
  substanceOnly species QMetab in liver = 0;
  substanceOnly species QGut in gut = 0;
  substanceOnly species QSkin_u in su = 0;
  substanceOnly species QSkin_e in se = 0;
  substanceOnly species QSkin_sc_u in scu = 0;
  substanceOnly species QSkin_sc_e in sce = 0;
  substanceOnly species QArt in Art = 0;
  substanceOnly species QVen in Ven = 0;
  substanceOnly species QExcret in default_compartment = 0;
  species QAir in default_compartment = 0;

  // Parameters:
  BM = 70;
  BSA = 190;
  Height_sc = 0.0001;
  Height_vs = 0.0122;
  scVFat = 0.209;
  scVRich = 0.105;
  scVLiver = 0.024;
  scVBlood = 0.068;
  VFat = 14.63;
  VRich = 7.35;
  VLiver = 1.68;
  VBlood = 4.76;
  VArt = 1.586667;
  VVen = 3.173333;
  VSkin_e = 0.2318;
  fSA_exposed = 0.1;
  VSkin_u = 2.0862;
  VSkin_sc_e = 0.0019;
  VSkin_sc_u = 0.0171;
  VPoor = 32.243;
  scFBlood = 4.8;
  scFFat = 0.085;
  scFPoor = 0.12;
  scFLiver = 0.27;
  scFSkin = 0.05;
  FBlood = 336;
  FFat = 28.56;
  FPoor = 40.32;
  FLiver = 90.72;
  FSkin = 16.8;
  FRich = 159.6;
  FSkin_e = 1.68;
  FSkin_u = 15.12;
  Falv = 2220;
  PCFat = 2.53;
  PCLiver = 0.923;
  PCRich = 0.875;
  PCPoor = 0.647;
  PCSkin_sc = 0.889;
  PCSkin = 0.889;
  PCAir = 1e99;
  Km = 0;
  Michaelis = 0;
  Vmax = 0;
  fub = 0.51;
  Kp_sc_vs = 0.01;
  kGut = 1;
  CLH = 132;
  Ke = 7.5;
  Frac = 1;
  Cinh = 0;
  Tinh = 0;
  OralDose = 0;
  DermalDose = 0;
  oral_dose = 0;
  t_oral_dose_1 = 0;
  t_oral_dose_2 = 1;
  f_su = 1.71;
  f_se = 0.19;

  // Reactions:
  _J0: QArt -> QFat; FFat*conc(QArt, Art);
  _J1: QFat -> QVen; FFat*conc(QFat, Fat)/PCFat;
  _J2: QArt -> QRich; FRich*conc(QArt, Art);
  _J3: QRich -> QVen; FRich*conc(QRich, Rich)/PCRich;
  _J4: QArt -> QPoor; FPoor*conc(QArt, Art);
  _J5: QPoor -> QVen; FPoor*conc(QPoor, pp)/PCPoor;
  _J6: QArt -> QLiver; FLiver*conc(QArt, Art);
  _J7: QLiver -> QVen; FLiver*conc(QLiver, liver)/PCLiver;
  _J8: QGut -> QLiver; kGut*QGut;
  _J9: QArt -> QSkin_u; FSkin_u*conc(QArt, Art);
  _J10: QSkin_u -> QVen; FSkin_u*conc(QSkin_u, su)/PCSkin;
  _J11: QSkin_u -> QSkin_sc_u; f_su*conc(QSkin_u, su)/PCSkin_sc;
  _J12: QSkin_sc_u -> QSkin_u; f_su*conc(QSkin_sc_u, scu);
  _J13: QArt -> QSkin_e; FSkin_e*conc(QArt, Art);
  _J14: QSkin_e -> QVen; FSkin_e*conc(QSkin_e, se)/PCSkin;
  _J15: QSkin_e -> QSkin_sc_e; f_se*conc(QSkin_e, se)/PCSkin_sc;
  _J16: QSkin_sc_e -> QSkin_e; f_se*conc(QSkin_sc_e, sce);
  _J17: QVen -> QArt; FBlood*conc(QVen, Ven);
  _J18: QLiver -> QMetab; fub*piecewise(metab_MM(Vmax, Km, PCLiver, QLiver, liver), Michaelis > 0.5, metab_MA(CLH, PCLiver, QLiver, liver));
  _J19: QArt -> QAir; Falv*conc(QArt, Art)/PCAir;
  _J20: QArt -> QExcret; Ke*fub*conc(QArt, Art);

  // Events:
  _E0: at (time >= t_oral_dose_2): QGut = QGut + oral_dose*Frac;
end
